# OpenSim document version 40000
XsensDataReaderSettings:
  trial_prefix: MT_012102F3_002-000
  ExperimentalSensors:
    ExperimentalSensor _00B48A50: name_in_model=torso_imu
    ExperimentalSensor _00B48A71: name_in_model=pelvis_imu
    ExperimentalSensor _00B48A66: name_in_model=hand_l_imu
    ExperimentalSensor _00B48A68: name_in_model=hand_r_imu
    ExperimentalSensor _00B48A74: name_in_model=humerus_l_imu
    ExperimentalSensor _00B48A4D: name_in_model=humerus_r_imu
    ExperimentalSensor _00B48A70: name_in_model=radius_l_imu
    ExperimentalSensor _00B48A5D: name_in_model=radius_r_imu
    ExperimentalSensor _00B48A6E: name_in_model=femur_l_imu
    ExperimentalSensor _00B48A6C: name_in_model=femur_r_imu
    ExperimentalSensor _00B48A69: name_in_model=tibia_l_imu
    ExperimentalSensor _00B48A73: name_in_model=tibia_r_imu
    ExperimentalSensor _00B48A60: name_in_model=calcn_l_imu
    ExperimentalSensor _00B48A67: name_in_model=calcn_r_imu
