# OpenSim document version 40000
XsensDataReaderSettings:
  trial_prefix: MT_012102F3_002-000
  ExperimentalSensors:
    ExperimentalSensor _00B48A68: name_in_model=torso_imu
    ExperimentalSensor _00B48A6C: name_in_model=pelvis_imu
    ExperimentalSensor _00B48A71: name_in_model=radius_r_imu
    ExperimentalSensor _00B48A67: name_in_model=humerus_r_imu
