# OpenSim document version 40000
XsensDataReaderSettings:
  trial_prefix: MT_012102F3_003-000
  ExperimentalSensors:
    ExperimentalSensor _00B48A71: name_in_model=pelvis_imu
    ExperimentalSensor _00B48A74: name_in_model=humerus_l_imu
    ExperimentalSensor _00B48A4D: name_in_model=humerus_r_imu
    ExperimentalSensor _00B48A70: name_in_model=radius_l_imu
    ExperimentalSensor _00B48A5D: name_in_model=radius_r_imu
    ExperimentalSensor _00B48A6E: name_in_model=femur_l_imu
    ExperimentalSensor _00B48A6C: name_in_model=femur_r_imu
    ExperimentalSensor _00B48A69: name_in_model=tibia_l_imu
    ExperimentalSensor _00B48A73: name_in_model=tibia_r_imu
